<?xml version="1.0"?>

<propeller name="prop_mccauley_6948">
	<ixx> 1.027 </ixx>
	<!--
	MoI ~ 0.5 * Prop_Weight(lb) (less hub) * [D2]/386
	w=24lb
	d=69inch=5.75ft
	MoI ~ 1.027
	-->
	<diameter unit="IN"> 68.9 </diameter>
	<numblades> 2 </numblades>
	<gearratio> 1 </gearratio>
	<cp_factor> 1.00 </cp_factor>
	<ct_factor> 1.00 </ct_factor>

	<!-- c_thrust and c_power tables as output by javaprop -->

	<table name="C_THRUST" type="internal">
		<tableData>
			0		0.085535
			0.05		0.082421
			0.1		0.087571
			0.15		0.086914
			0.2		0.085388
			0.25		0.082504
			0.3		0.079996
			0.35		0.076765
			0.4		0.072637
			0.45		0.06796
			0.5		0.062613
			0.55		0.056706
			0.6		0.050626
			0.65		0.044389
			0.7		0.038011
			0.75		0.031507
			0.8		0.024885
			0.81		0.023547
			0.82		0.022205
			0.83		0.020858
			0.84		0.019508
			0.85		0.018152
			0.86		0.016795
			0.87		0.015431
			0.88		0.014064
			0.89		0.012693
			0.9		0.011317
			0.91		0.009938
			0.92		0.008554
			0.93		0.007168
			0.94		0.005777
			0.95		0.004381
			0.96		0.002995
			0.97		0.001535
			0.98		0.000117
			0.99		-0.001313
			1		-0.002719
			1.01		-0.004148
		</tableData>
	</table>


	<table name="C_POWER" type="internal">
		<tableData>
			0	0.041477
			0.05	0.044862
			0.1	0.040264
			0.15	0.040907
			0.2	0.04168
			0.25	0.041999
			0.3	0.042628
			0.35	0.043053
			0.4	0.043017
			0.45	0.042567
			0.5	0.041514
			0.55	0.039788
			0.6	0.037588
			0.65	0.034888
			0.7	0.031663
			0.75	0.027892
			0.8	0.023556
			0.81	0.022618
			0.82	0.021657
			0.83	0.020672
			0.84	0.019665
			0.85	0.018632
			0.86	0.017577
			0.87	0.016497
			0.88	0.015392
			0.89	0.014262
			0.9	0.013108
			0.91	0.011929
			0.92	0.010725
			0.93	0.009497
			0.94	0.008242
			0.95	0.006963
			0.96	0.00567
			0.97	0.004284
			0.98	0.002917
			0.99	0.001514
			1	0.000114
			1.01	-0.001332

		</tableData>
	</table>

	<!-- thrust effects of helical tip Mach -->
	<table name="CT_MACH" type="internal">
		<tableData>
			0.85   1.0
			1.05   0.8
		</tableData>
	</table>

	<!-- power-required effects of helical tip Mach -->
	<table name="CP_MACH" type="internal">
		<tableData>
			0.85   1.0
			1.05   1.8
			2.00   1.4
		</tableData>
	</table>

</propeller>
