<?xml version="1.0"?>

<aerodynamics>

	<alphalimits unit="DEG">
		<min>-5.0</min>
		<max>14.0</max>
	</alphalimits>

	<hysteresis_limits unit="DEG">
		<min> 5.0</min>
		<max>20.0</max>
	</hysteresis_limits>

	<function name="aero/function/ground-effect-factor-lift">
		<description>Change in lift due to ground effect factor</description>
		<table>
			<independentVar>aero/h_b-mac-ft</independentVar>
			<tableData>
				0.0  1.203
				0.1  1.127
				0.15 1.090
				0.2  1.073
				0.3  1.046
				0.4  1.055
				0.5  1.019
				0.6  1.013
				0.7  1.008
				0.8  1.006
				0.9  1.003
				1.0  1.002
				1.1  1.0
			</tableData>
		</table>
	</function>

	<function name="aero/function/ground-effect-factor-drag">
		<description>Change in drag due to ground effect</description>
		<table>
			<independentVar>aero/h_b-mac-ft</independentVar>
			<tableData>
				0.0  0.480
				0.1  0.515
				0.15 0.629
				0.2  0.709
				0.3  0.815
				0.4  0.882
				0.5  0.928
				0.6  0.962
				0.7  0.988
				0.8  1.0
				0.9  1.0
				1.0  1.0
				1.1  1.0
			</tableData>
		</table>
	</function>

	<axis name="DRAG">
		<function name="aero/coefficient/CD0">
			<description>Drag_at_zero_lift</description>
			<product>
				<property>aero/function/ground-effect-factor-drag</property>
				<property>aero/qbar-psf</property>
				<property>metrics/Sw-sqft</property>
				<table>
					<independentVar>aero/alpha-rad</independentVar>
					<tableData>
						-1.5700	1.5000
						-.2793         .1014
						-.1396         .2981E-01
						-.1047         .2156E-01
						-.6981E-01     .1687E-01
						-.3491E-01     .1535E-01
						.000         .1702E-01
						.3491E-01     .2225E-01
						.6981E-01     .3142E-01
						.1396         .6338E-01
						.1571         .7447E-01
						.1745         .8682E-01
						.2094         .1123
						.2443         .1366
						.2793         .1595
						.3142         .1797
						.3316         .1885
						.3491         .1886
						.3665         .1852
						.3840         .1610
						.4189         .1039
						1.5700	1.5000
					</tableData>
				</table>
			</product>
		</function>
		<function name="aero/coefficient/CDi">
			<description>Induced_drag</description>
			<product>
				<property>aero/qbar-psf</property>
				<property>metrics/Sw-sqft</property>
				<property>aero/cl-squared</property>
				<value>0.0100</value>
			</product>
		</function>
		<function name="aero/coefficient/CDflap">
			<description>Drag_due_to_flaps</description>
			<product>
				<property>aero/qbar-psf</property>
				<property>metrics/Sw-sqft</property>
				<property>fcs/flap-pos-deg</property>
				<value>0.0010</value>
			</product>
		</function>
		<function name="aero/coefficient/CDsb">
			<description>Drag_due_to_speedbrakes</description>
			<product>
				<property>aero/qbar-psf</property>
				<property>metrics/Sw-sqft</property>
				<property>fcs/speedbrake-pos-norm</property>
				<value>0.0280</value>
			</product>
		</function>
		<function name="aero/coefficient/CDbeta">
			<description>Drag_due_to_sideslip</description>
			<product>
				<property>aero/qbar-psf</property>
				<property>metrics/Sw-sqft</property>
				<table>
					<independentVar>aero/beta-rad</independentVar>
					<tableData>
						-1.5700	1.2300
						-0.2600	0.0500
						0.0000	0.0000
						0.2600	0.0500
						1.5700	1.2300
					</tableData>
				</table>
			</product>
		</function>
		<function name="aero/coefficient/CDde">
			<description>Drag_due_to_Elevator_Deflection</description>
			<product>
				<property>aero/qbar-psf</property>
				<property>metrics/Sh-sqft</property>
				<abs><property>fcs/elevator-pos-norm</property></abs>
				<value>0.0300</value>
			</product>
		</function>
	</axis>

	<axis name="SIDE">
		<function name="aero/coefficient/CYb">
			<description>Side_force_due_to_beta</description>
			<product>
				<property>aero/qbar-psf</property>
				<property>metrics/Sw-sqft</property>
				<property>aero/beta-rad</property>
				<value>-.2927</value>
			</product>
		</function>
	</axis>

	<axis name="LIFT">
		<function name="aero/coefficient/CLalpha">
			<description>Lift_due_to_alpha</description>
			<product>
				<property>aero/function/ground-effect-factor-lift</property>
				<property>aero/qbar-psf</property>
				<property>metrics/Sw-sqft</property>
				<table>
					<independentVar>aero/alpha-rad</independentVar>
					<tableData>
						-.2793        -1.298
						-.1396        -.5118
						-.1047        -.3244
						-.6981E-01    -.1446
						-.3491E-01     .2816E-01
						.000         .2070
						.3491E-01     .3944
						.6981E-01     .5894
						.1396         1.002
						.1571         1.108
						.1745         1.216
						.2094         1.409
						.2443         1.565
						.2793         1.691
						.3142         1.783
						.3316         1.814
						.3491         1.791
						.3665         1.737
						.3840         1.531
						.4189         .6785
					</tableData>
				</table>
			</product>
		</function>
		<function name="aero/coefficient/dCLflap">
			<description>Delta_Lift_due_to_flaps</description>
			<product>
				<property>aero/qbar-psf</property>
				<property>metrics/Sw-sqft</property>
				<property>fcs/flap-pos-deg</property>
				<value>0.01333</value>
			</product>
		</function>
		<function name="aero/coefficient/dCLsb">
			<description>Delta_Lift_due_to_speedbrake</description>
			<product>
				<property>aero/qbar-psf</property>
				<property>metrics/Sw-sqft</property>
				<property>fcs/speedbrake-pos-norm</property>
				<value>0.0000</value>
			</product>
		</function>
		<function name="aero/coefficient/CLde">
			<description>Lift_due_to_Elevator_Deflection</description>
			<product>
				<property>aero/qbar-psf</property>
				<property>metrics/Sw-sqft</property>
				<table>
					<independentVar>fcs/elevator-pos-deg</independentVar>
					<tableData>
						-26.00	   .1787
						-17.00	   .1664
						-10.00	   .1138
						-5.00	   .5690E-01
						.00	  -.1138E-03
						5.00	  -.5690E-01
						9.00	  -.1024
						13.00	  -.1434
						17.00	  -.1664
					</tableData>
				</table>
			</product>
		</function>

	</axis>

	<axis name="ROLL">
		<function name="aero/coefficient/Clb">
			<description>Roll_moment_due_to_beta</description>
			<product>
				<property>aero/qbar-psf</property>
				<property>metrics/Sw-sqft</property>
				<property>metrics/bw-ft</property>
				<property>aero/beta-rad</property>
				<value>-0.0890</value>
			</product>
		</function>
		<function name="aero/coefficient/Clp">
			<description>Roll_moment_due_to_roll_rate</description>
			<product>
				<property>aero/qbar-psf</property>
				<property>metrics/Sw-sqft</property>
				<property>metrics/bw-ft</property>
				<property>aero/bi2vel</property>
				<property>velocities/p-aero-rad_sec</property>
				<value>-0.4700</value>
			</product>
		</function>
		<function name="aero/coefficient/Clr">
			<description>Roll_moment_due_to_yaw_rate</description>
			<product>
				<property>aero/qbar-psf</property>
				<property>metrics/Sw-sqft</property>
				<property>metrics/bw-ft</property>
				<property>aero/bi2vel</property>
				<property>velocities/r-aero-rad_sec</property>
				<value>0.0960</value>
			</product>
		</function>
		<function name="aero/coefficient/Clda">
			<description>Roll_moment_due_to_aileron</description>
			<product>
				<property>aero/qbar-psf</property>
				<property>metrics/Sw-sqft</property>
				<property>metrics/bw-ft</property>
				<property>fcs/left-aileron-pos-rad</property>
				<table>
					<independentVar>velocities/mach</independentVar>
					<tableData>
						0.0000	0.1700
						2.0000	0.0570
					</tableData>
				</table>
			</product>
		</function>
		<function name="aero/coefficient/Cldr">
			<description>Roll_moment_due_to_rudder</description>
			<product>
				<property>aero/qbar-psf</property>
				<property>metrics/Sw-sqft</property>
				<property>metrics/bw-ft</property>
				<property>fcs/rudder-pos-rad</property>
				<value>0.0140</value>
			</product>
		</function>
	</axis>

	<axis name="PITCH">
		<function name="aero/coefficient/Cmalpha">
			<description>Pitch_moment_due_to_alpha</description>
			<product>
				<property>aero/qbar-psf</property>
				<property>metrics/Sw-sqft</property>
				<property>metrics/cbarw-ft</property>
				<property>aero/alpha-rad</property>
				<value>-2.0000</value>
				<!--
					ported from the c172p:
					stall and spin (5):
					horizontal tail stall (for flat spin)
				-->
				<table>
					<independentVar lookup="row">aero/alpha-deg</independentVar>
					<tableData>
					20    1
					25    0.6
					35    0.4
					45    0.5
					55    0.4
					65    0.2
					90    0.1
					</tableData>
				</table>
			</product>
		</function>
		<function name="aero/coefficient/Cmde">
			<description>Pitch_moment_due_to_elevator</description>
			<product>
				<property>aero/qbar-psf</property>
				<property>metrics/Sw-sqft</property>
				<property>metrics/cbarw-ft</property>
				<property>fcs/elevator-pos-rad</property>
				<value>-1.2</value>
				<!--
					ported from the c172p:
					stall and spin (6):
					elevator loss of efficiency when stalled
				-->
				<table>
					<independentVar lookup="row">fcs/elevator-pos-rad</independentVar>
					<independentVar lookup="column">aero/alpha-deg</independentVar>
					<tableData>
						18  25   35     45     55      65      90
					-0.49   1   0.5  0.2    0.1    0.1     0.1     0.1
					0       1   0.6  0.3    0.15   0.1     0.1     0.1
					0.40    1   0.9  0.8    0.7    0.6     0.5     0.4
					</tableData>
				</table>
			</product>
		</function>
		<function name="aero/coefficient/Cmq">
			<description>Pitch_moment_due_to_pitch_rate</description>
			<product>
				<property>aero/qbar-psf</property>
				<property>metrics/Sw-sqft</property>
				<property>metrics/cbarw-ft</property>
				<property>aero/ci2vel</property>
				<property>velocities/q-aero-rad_sec</property>
				<value>-12.4000</value>
			</product>
		</function>
		<function name="aero/coefficient/Cmadot">
			<description>Pitch_moment_due_to_alpha_rate</description>
			<product>
				<property>aero/qbarUW-psf</property>
				<property>metrics/Sw-sqft</property>
				<property>metrics/cbarw-ft</property>
				<property>aero/ci2vel</property>
				<property>aero/alphadot-rad_sec</property>
				<value>-7.00</value>
			</product>
		</function>
	</axis>

	<axis name="YAW">
		<function name="aero/coefficient/Cnb">
			<description>Yaw_moment_due_to_beta</description>
			<product>
				<property>aero/qbar-psf</property>
				<property>metrics/Sw-sqft</property>
				<property>metrics/bw-ft</property>
				<property>aero/beta-rad</property>
				<value>0.0650</value>
			</product>
		</function>
		<function name="aero/coefficient/Cnr">
			<description>Yaw_moment_due_to_yaw_rate</description>
			<product>
				<property>aero/qbar-psf</property>
				<property>metrics/Sw-sqft</property>
				<property>metrics/bw-ft</property>
				<property>aero/bi2vel</property>
				<property>velocities/r-aero-rad_sec</property>
				<value>-0.0990</value>
			</product>
		</function>
		<function name="aero/coefficient/Cndr">
			<description>Yaw_moment_due_to_rudder</description>
			<product>
				<property>aero/qbar-psf</property>
				<property>metrics/Sw-sqft</property>
				<property>metrics/bw-ft</property>
				<property>fcs/rudder-pos-rad</property>
				<value>-0.0660</value>
			</product>
		</function>
		<function name="aero/coefficient/Cnda">
			<description>Adverse_yaw</description>
			<product>
				<property>aero/qbar-psf</property>
				<property>metrics/Sw-sqft</property>
				<property>metrics/bw-ft</property>
				<property>fcs/left-aileron-pos-rad</property>
				<value>-0.0100</value>
			</product>
		</function>
	</axis>
</aerodynamics>
