<?xml version="1.0"?>

<!--	Control Surface Deflections (reference: TCDS)

up		down
Wing Flaps	0 deg		40 +-2 deg
Ailerons	20 +2 -0 deg	14 +2 -0 deg
Elevator	25 +-1 deg	15 +-1 deg
Elevator trim	10 +-1 deg	20 +-1 deg

left		right
Rudder		23 +0 -2 deg	23 +0 -2 deg
-->

<flight_control name="FCS: c150">
	<channel name="Pitch">
		<fcs_function name="Pitch Trim Sum">
			<function>
				<table>
					<independentVar lookup="row">fcs/elevator-cmd-norm</independentVar>
					<independentVar lookup="column">fcs/pitch-trim-cmd-norm</independentVar>
					<tableData>
							-1	1
						-1	-1	-1
						0	-0.5	0.5
						1	1	1
					</tableData>
				</table>
			</function>
		</fcs_function>

		<aerosurface_scale name="Elevator Control">
			<input>fcs/pitch-trim-sum</input>
			<range>
				<min>-25</min>
				<max>15</max>
			</range>
			<output>fcs/elevator-pos-deg</output>
		</aerosurface_scale>
		<pure_gain>
			<input>fcs/elevator-pos-deg</input>
			<gain>0.01745</gain>
			<output>fcs/elevator-pos-rad</output>
		</pure_gain>
		<aerosurface_scale name="Elevator Position Normalized">
			<input>fcs/elevator-pos-deg</input>
			<domain>
				<min>-26</min>
				<max>17</max>
			</domain>
			<range>
				<min>-1</min>
				<max>1</max>
			</range>
			<output>fcs/elevator-pos-norm</output>
		</aerosurface_scale>
	</channel>
	<channel name="Roll">
		<summer name="Roll Trim Sum">
			<input>fcs/aileron-cmd-norm</input>
			<input>fcs/roll-trim-cmd-norm</input>
			<clipto>
				<min>-1</min>
				<max>1</max>
			</clipto>
		</summer>

		<aerosurface_scale name="Left Aileron Control">
			<input>fcs/roll-trim-sum</input>
			<range>
				<min>-20</min>
				<max>14</max>
			</range>
			<output>fcs/left-aileron-pos-deg</output>
		</aerosurface_scale>
		<pure_gain>
			<input>fcs/left-aileron-pos-deg</input>
			<gain>0.01745</gain>
			<output>fcs/left-aileron-pos-rad</output>
		</pure_gain>
		<aerosurface_scale name="Left Aileron Position Normalized">
			<input>fcs/left-aileron-pos-deg</input>
			<domain>
				<min>-20</min>
				<max>14</max>
			</domain>
			<range>
				<min>-1</min>
				<max>1</max>
			</range>
			<output>fcs/left-aileron-pos-norm</output>
		</aerosurface_scale>

		<aerosurface_scale name="Right Aileron Control">
			<input>fcs/roll-trim-sum</input>
			<range>
				<min>-20</min>
				<max>14</max>
			</range>
			<output>fcs/right-aileron-pos-deg</output>
		</aerosurface_scale>
		<pure_gain>
			<input>fcs/right-aileron-pos-deg</input>
			<gain>0.01745</gain>
			<output>fcs/right-aileron-pos-rad</output>
		</pure_gain>
		<aerosurface_scale name="Right Aileron Position Normalized">
			<input>fcs/right-aileron-pos-deg</input>
			<domain>
				<min>-20</min>
				<max>14</max>
			</domain>
			<range>
				<min>-1</min>
				<max>1</max>
			</range>
			<output>fcs/right-aileron-pos-norm</output>
		</aerosurface_scale>
	</channel>
	<channel name="Yaw">
		<summer name="Rudder Command Sum">
			<input>fcs/rudder-cmd-norm</input>
			<input>fcs/yaw-trim-cmd-norm</input>
			<clipto>
				<min>-1</min>
				<max>1</max>
			</clipto>
		</summer>

		<aerosurface_scale name="Rudder Control">
			<input>fcs/rudder-command-sum</input>
			<range>
				<min>-23</min>
				<max>23</max>
			</range>
			<output>fcs/rudder-pos-deg</output>
		</aerosurface_scale>
		<pure_gain>
			<input>fcs/rudder-pos-deg</input>
			<gain>0.01745</gain>
			<output>fcs/rudder-pos-rad</output>
		</pure_gain>
		<aerosurface_scale name="Rudder Position Normalized">
			<input>fcs/rudder-pos-deg</input>
			<domain>
				<min>-23</min>
				<max>23</max>
			</domain>
			<range>
				<min>-1</min>
				<max>1</max>
			</range>
			<output>fcs/rudder-pos-norm</output>
		</aerosurface_scale>
	</channel>
	<channel name="Flaps">
		<!--	Calculate flap motor speed factor	-->
		<!--	Owners Manual:
				at cruise (121 mph = 105 kts)
					extension 9s
					retraction 6s
		-->
		<!--	Aerodynamic forces aid during retraction and work against the motor during extension	-->
		<!--	Aerodynamic force: qbar * A
					at cruise: 0.5 * rho * v2 * A
						= 0.5 * 1.225 kg/m3 * (54.09 m/s)2 * 1.72 m2
						= 3082.25 N
						= 692.92 lbf
		-->
		<!--	Assume: extension and retraction 7.5s when aircraft is stationary (assume: weight contribution neglectable)	-->
		<fcs_function>
			<function>
				<product>
					<property>aero/qbar-psf</property>
					<value>18.51</value>
					<value>0.00216475</value><!-- 1.5 sec / 692.92 lbf -->
				</product>
			</function>
			<clipto>
				<min>0.0</min>
				<max>7.5</max>
			</clipto>
			<output>fcs/flap-motor-factor-aero</output>
		</fcs_function>
		<fcs_function>
			<function>
				<quotient>
					<value>1</value>
					<sum>
						<value>7.5</value>
						<property>fcs/flap-motor-factor-aero</property>
					</sum>
				</quotient>
			</function>
			<output>fcs/flap-motor-factor-extend</output>
		</fcs_function>
		<fcs_function>
			<function>
				<quotient>
					<value>1</value>
					<difference>
						<value>7.5</value>
						<property>fcs/flap-motor-factor-aero</property>
					</difference>
				</quotient>
			</function>
			<output>fcs/flap-motor-factor-retract</output>
		</fcs_function>
		<switch>
			<default value="fcs/flap-motor-factor-extend"/>
			<test value="fcs/flap-motor-factor-retract">
				/controls/flight/flaps-cmd lt 0
			</test>
			<output>/controls/flight/flaps-motor-factor</output>
		</switch>

		<kinematic name="Flaps Control">
			<input>fcs/flap-cmd-norm</input>
			<traverse>
				<setting>
					<position>0</position>
					<time>0</time>
				</setting>
				<setting>
					<position>10</position>
					<time>1</time>
				</setting>
				<setting>
					<position>20</position>
					<time>1</time>
				</setting>
				<setting>
					<position>30</position>
					<time>1</time>
				</setting>
				<setting>
					<position>40</position>
					<time>1</time>
				</setting>
			</traverse>
			<output>fcs/flap-pos-deg</output>
		</kinematic>
		<aerosurface_scale name="Flap Position Normalizer">
			<input>fcs/flap-pos-deg</input>
			<domain>
				<min>0</min>  <!-- Flaps actual minimum position -->
				<max>40</max>  <!-- Flaps actual maximum position -->
			</domain>
			<range>
				<min>0</min>  <!-- Flaps normalized minimum position -->
				<max>1</max>  <!-- Flaps normalized maximum position -->
			</range>
			<output>fcs/flap-pos-norm</output>
		</aerosurface_scale>
	</channel>
	<channel name="Preflight Check">
		<switch>
			<default value="0"/>
			<test value="200" logic="AND">
				/controls/preflight/pull-nose-down eq 1
				gear/unit[0]/WOW eq 1
				gear/unit[1]/WOW eq 1
				gear/unit[2]/WOW eq 1
			</test>
			<output>external_reactions/pull_nose_down/magnitude</output>
		</switch>
		<kinematic>
			<input>/controls/preflight/suck-stall-warning</input>
			<traverse>
				<setting>
					<position>0</position>
					<time>0.0</time>
				</setting>
				<setting>
					<position>1.0</position>
					<time>0.8</time>
				</setting>
			</traverse>
			<output>fcs/sound/stall-warning-suction-preflight</output>
		</kinematic>
	</channel>
	<channel name="Doors" execrate="2">
		<!--	Left Door	-->
		<kinematic>
			<input>/sim/model/c150/doors/door[0]/cmd</input>
			<traverse>
				<setting>
					<position>0</position>
					<time>0.0</time>
				</setting>
				<setting>
					<position>1.0</position>
					<time>3.0</time>
				</setting>
			</traverse>
			<output>fcs/door[0]/pos-norm</output>
		</kinematic>
		<fcs_function>
			<function>
				<table>
					<independentVar lookup="row">fcs/door[0]/pos-norm</independentVar>
					<independentVar lookup="column">velocities/vc-kts</independentVar>
					<independentVar lookup="table">/sim/model/c150/doors/door[0]/cmd</independentVar>
					<tableData breakPoint="0">
						0	40
						0	0	0
						0.05	0.08	0.08
						0.15	0.05	0.05
						0.3	0.05	0.05
						1	1.0	0.05
					</tableData>
					<tableData breakPoint="1">
						0	40
						0	0	0
						1	1.0	0.05
					</tableData>
				</table>
			</function>
			<output>/sim/model/c150/doors/door[0]/position-norm</output>
		</fcs_function>
		<!--	Right Door	-->
		<kinematic>
			<input>/sim/model/c150/doors/door[1]/cmd</input>
			<traverse>
				<setting>
					<position>0</position>
					<time>0.0</time>
				</setting>
				<setting>
					<position>1.0</position>
					<time>3.0</time>
				</setting>
			</traverse>
			<output>fcs/door[1]/pos-norm</output>
		</kinematic>
		<fcs_function>
			<function>
				<table>
					<independentVar lookup="row">fcs/door[1]/pos-norm</independentVar>
					<independentVar lookup="column">velocities/vc-kts</independentVar>
					<independentVar lookup="table">/sim/model/c150/doors/door[1]/cmd</independentVar>
					<tableData breakPoint="0">
						0	40
						0	0	0
						0.05	0.08	0.08
						0.15	0.05	0.05
						0.3	0.05	0.05
						1	1.0	0.05
					</tableData>
					<tableData breakPoint="1">
						0	40
						0	0	0
						1	1.0	0.05
					</tableData>
				</table>
			</function>
			<output>/sim/model/c150/doors/door[1]/position-norm</output>
		</fcs_function>
	</channel>
	<channel name="Windows" execrate="2">
		<!--	Left Window	-->
		<kinematic>
			<input>/sim/model/c150/doors/window[0]/lock-cmd</input>
			<traverse>
				<setting>
					<position>0</position>
					<time>0.0</time>
				</setting>
				<setting>
					<position>1.0</position>
					<time>0.7</time>
				</setting>
			</traverse>
			<output>/sim/model/c150/doors/window[0]/lock-pos-norm</output>
		</kinematic>
		<lag_filter>
			<input>/sim/model/c150/doors/window[0]/cmd-norm</input>
			<c1>5.0</c1>
			<output>fcs/window-pos-norm[0]</output>
		</lag_filter>
		<fcs_function>
			<function>
				<sum>
					<table>
						<independentVar>/sim/model/c150/doors/window[0]/lock-pos-norm</independentVar>
						<tableData>
							0.5	0
							1	0.1
						</tableData>
					</table>
					<product>
						<property>fcs/window-pos-norm[0]</property>
						<value>0.9</value>
					</product>
				</sum>
			</function>
			<output>/sim/model/c150/doors/window[0]/position-norm</output>
		</fcs_function>
		<!--	Right Window	-->
		<kinematic>
			<input>/sim/model/c150/doors/window[1]/lock-cmd</input>
			<traverse>
				<setting>
					<position>0</position>
					<time>0.0</time>
				</setting>
				<setting>
					<position>1.0</position>
					<time>0.7</time>
				</setting>
			</traverse>
			<output>/sim/model/c150/doors/window[1]/lock-pos-norm</output>
		</kinematic>
		<lag_filter>
			<input>/sim/model/c150/doors/window[1]/cmd-norm</input>
			<c1>5.0</c1>
			<output>fcs/window-pos-norm[1]</output>
		</lag_filter>
		<fcs_function>
			<function>
				<sum>
					<table>
						<independentVar>/sim/model/c150/doors/window[1]/lock-pos-norm</independentVar>
						<tableData>
							0.5	0
							1	0.1
						</tableData>
					</table>
					<product>
						<property>fcs/window-pos-norm[1]</property>
						<value>0.9</value>
					</product>
				</sum>
			</function>
			<output>/sim/model/c150/doors/window[1]/position-norm</output>
		</fcs_function>
	</channel>
	<channel name="Cockpit Animations" execrate="2">
		<kinematic>
			<input>/controls/gear/brake-parking</input>
			<traverse>
				<setting>
					<position>0</position>
					<time>0.0</time>
				</setting>
				<setting>
					<position>1.0</position>
					<time>0.5</time>
				</setting>
			</traverse>
			<output>/controls/gear/brake-parking-pos</output>
		</kinematic>
		<kinematic>
			<input>/controls/engines/engine/primer-lever</input>
			<traverse>
				<setting>
					<position>0</position>
					<time>0.0</time>
				</setting>
				<setting>
					<position>1.0</position>
					<time>0.5</time>
				</setting>
			</traverse>
			<output>/controls/engines/engine/primer-lever-pos</output>
		</kinematic>
		<kinematic>
			<input>/controls/anti-ice/engine[0]/carb-heat</input>
			<traverse>
				<setting>
					<position>0</position>
					<time>0.0</time>
				</setting>
				<setting>
					<position>1.0</position>
					<time>0.5</time>
				</setting>
			</traverse>
			<output>/controls/anti-ice/engine[0]/carb-heat-pos</output>
		</kinematic>
	</channel>
	<channel name="Sound">
		<switch>
			<default value="0.0"/>
			<test value="1.0">
				/sim/model/c150/doors/door[0]/position-norm gt 0.0
			</test>
			<test value="0.5">
				/sim/model/c150/doors/window[0]/position-norm gt 0.0
			</test>
			<output>fcs/sound/ldoorw</output>
		</switch>
		<switch>
			<default value="0.0"/>
			<test value="1.0">
				/sim/model/c150/doors/door[1]/position-norm gt 0.0
			</test>
			<test value="0.5">
				/sim/model/c150/doors/window[1]/position-norm gt 0.0
			</test>
			<output>fcs/sound/rdoorw</output>
		</switch>
		<summer>
			<input>fcs/sound/ldoorw</input>
			<input>fcs/sound/rdoorw</input>
			<output>fcs/sound/doorw-raw</output>
		</summer>
		<switch>
			<default value="0.0"/>
			<test value="fcs/sound/doorw-raw">
				velocities/vc-kts gt 10.0
			</test>
			<output>/sim/model/c150/doors/doorw</output>
		</switch>
		<fcs_function>
			<function>
				<sum>
					<product>
						<property>fcs/sound/doorw-raw</property>
						<value>0.5</value>
					</product>
					<value>1.0</value>
				</sum>
			</function>
			<output>fcs/sound/doorsk-raw</output>
		</fcs_function>
		<switch>
			<default value="1.0"/>
			<test value="fcs/sound/doorsk-raw">
				/sim/current-view/internal gt 0
			</test>
			<output>/sim/model/c150/sound/doorsk</output>
		</switch>
		<!--	Stall Warning	-->
		<!--	Calculate suction at stall warning vent	-->
		<fcs_function>
			<function>
				<table>
					<independentVar lookup="row">aero/alpha-deg</independentVar>
					<independentVar lookup="column">velocities/vc-kts</independentVar>
					<tableData>
							0	50	100
						10	0	0	0
						13	0	0.5	0.7
						18	0	0.95	1.0
						35	0	0.95	1.0
						45	0	0	0
					</tableData>
				</table>
			</function>
			<output>fcs/sound/stall-warning-suction-aero</output>
		</fcs_function>
		<summer>
			<input>fcs/sound/stall-warning-suction-aero</input>
			<input>fcs/sound/stall-warning-suction-preflight</input>
			<output>/sim/model/c150/sound/stall-warning</output>
		</summer>
	</channel>
	<channel name="Instrumentation" execrate="2">
		<pure_gain name="/instrumentation/airspeed-indicator/indicated-speed-mph">
			<input>/instrumentation/airspeed-indicator/indicated-speed-kt</input>
			<gain>1.15077945</gain>	<!-- kts to mph -->
		</pure_gain>
	</channel>
	<channel name="Occupants" execrate="2">
		<switch name="pax/pilot/present">
			<default value="0"/>
			<test value="1">
				inertia/pointmass-weight-lbs[0] ge 50
			</test>
		</switch>
		<switch name="pax/co-pilot/present">
			<default value="0"/>
			<test value="1">
				inertia/pointmass-weight-lbs[0] ge 50
			</test>
		</switch>
	</channel>
	<channel name="tiedowns">

		<fcs_function name="tiedown-left-x">
			<output>external_reactions/tiedown-left/x</output>
			<function>
				<sin>
					<toradians>
						<property>/sim/model/c150/tiedowns/left/heading-deg</property>
					</toradians>
				</sin>
			</function>
		</fcs_function>

		<fcs_function name="tiedown-left-y">
			<output>external_reactions/tiedown-left/y</output>
			<function>
				<product>
					<value>-1</value>
					<cos>
						<toradians>
							<property>/sim/model/c150/tiedowns/left/heading-deg</property>
						</toradians>
					</cos>
				</product>
			</function>
		</fcs_function>

		<fcs_function name="tiedown-left-z">
			<output>external_reactions/tiedown-left/z</output>
			<function>
				<product>
					<value>-1</value>
					<sin>
						<toradians>
							<property>/sim/model/c150/tiedowns/left/pitch-deg</property>
						</toradians>
					</sin>
				</product>
			</function>
		</fcs_function>

		<fcs_function name="tiedown-right-x">
			<output>external_reactions/tiedown-right/x</output>
			<function>
				<product>
					<value>-1</value>
					<sin>
						<toradians>
							<property>/sim/model/c150/tiedowns/right/heading-deg</property>
						</toradians>
					</sin>
				</product>
			</function>
		</fcs_function>

		<fcs_function name="tiedown-right-y">
			<output>external_reactions/tiedown-right/y</output>
			<function>
				<cos>
					<toradians>
						<property>/sim/model/c150/tiedowns/right/heading-deg</property>
					</toradians>
				</cos>
			</function>
		</fcs_function>

		<fcs_function name="tiedown-right-z">
			<output>external_reactions/tiedown-right/z</output>
			<function>
				<product>
					<value>-1</value>
					<sin>
						<toradians>
							<property>/sim/model/c150/tiedowns/right/pitch-deg</property>
						</toradians>
					</sin>
				</product>
			</function>
		</fcs_function>

		<fcs_function name="tiedown-tail-x">
			<output>external_reactions/tiedown-tail/x</output>
			<function>
				<cos>
					<toradians>
						<property>/sim/model/c150/tiedowns/tail/heading-deg</property>
					</toradians>
				</cos>
			</function>
		</fcs_function>

		<fcs_function name="tiedown-tail-y">
			<output>external_reactions/tiedown-tail/y</output>
			<function>
				<sin>
					<toradians>
						<property>/sim/model/c150/tiedowns/tail/heading-deg</property>
					</toradians>
				</sin>
			</function>
		</fcs_function>

		<fcs_function name="tiedown-tail-z">
			<output>external_reactions/tiedown-tail/z</output>
			<function>
				<product>
					<value>-1</value>
					<sin>
						<toradians>
							<property>/sim/model/c150/tiedowns/tail/pitch-deg</property>
						</toradians>
					</sin>
				</product>
			</function>
		</fcs_function>

		<summer name="fcs/tiedown-left-mag-error">
			<input>/sim/model/c150/tiedowns/left/length</input>
			<input>-/sim/model/c150/tiedowns/left/ref-length</input>
		</summer>

		<summer name="fcs/tiedown-right-mag-error">
			<input>/sim/model/c150/tiedowns/right/length</input>
			<input>-/sim/model/c150/tiedowns/right/ref-length</input>
		</summer>

		<summer name="fcs/tiedown-tail-mag-error">
			<input>/sim/model/c150/tiedowns/tail/length</input>
			<input>-/sim/model/c150/tiedowns/tail/ref-length</input>
		</summer>

		<pid name="fcs/tiedown-left-magnitude-pid">
			<input>fcs/tiedown-left-mag-error</input>
			<kp>7000.0</kp>
			<ki>0.0</ki>
			<kd>500.0</kd>
			<clipto>
				<min>-50</min>
				<max>1000</max>
			</clipto>
		</pid>

		<pid name="fcs/tiedown-right-magnitude-pid">
			<input>fcs/tiedown-right-mag-error</input>
			<kp>7000.0</kp>
			<ki>0.0</ki>
			<kd>500.0</kd>
			<clipto>
				<min>-50</min>
				<max>1000</max>
			</clipto>
		</pid>

		<pid name="fcs/tiedown-tail-magnitude-pid">
			<input>fcs/tiedown-tail-mag-error</input>
			<kp>7000.0</kp>
			<ki>0.0</ki>
			<kd>500.0</kd>
			<clipto>
				<min>-50</min>
				<max>1000</max>
			</clipto>
		</pid>

		<switch name="fcs/tiedown-left-magnitude">
			<output>external_reactions/tiedown-left/magnitude</output>
			<default value="0"/>

			<test logic="AND" value="fcs/tiedown-left-magnitude-pid">
				/sim/model/c150/tiedowns/left/attached EQ 1
			</test>
		</switch>

		<switch name="fcs/tiedown-right-magnitude">
			<output>external_reactions/tiedown-right/magnitude</output>
			<default value="0"/>

			<test logic="AND" value="fcs/tiedown-right-magnitude-pid">
				/sim/model/c150/tiedowns/right/attached EQ 1
			</test>
		</switch>

		<switch name="fcs/tiedown-tail-magnitude">
			<output>external_reactions/tiedown-tail/magnitude</output>
			<default value="0"/>

			<test logic="AND" value="fcs/tiedown-tail-magnitude-pid">
				/sim/model/c150/tiedowns/tail/attached EQ 1
			</test>
		</switch>

	</channel>
</flight_control>
